<?xml version="1.0" encoding="UTF-8"?>
<networkml xmlns="http://morphml.org/networkml/schema"
    xmlns:meta="http://morphml.org/metadata/schema"
    xmlns:xsi="http://www.w3.org/2001/XMLSchema-instance"
    xsi:schemaLocation="http://morphml.org/networkml/schema
			../../Schemata/v1.7.1/Level3/NetworkML_v1.7.1.xsd"
    lengthUnits="micron">

    <meta:notes>
      Simulation of a piece of one layer of entorhinal cortex in rats.
    </meta:notes>

        <populations>

        <population name="CellGroupA" cell_type="ecneuron">
            <instances>
		<instance id="">
		  <location x="-10" y=" -10" z=" 10" />
		</instance>
		<instance id="">
		  <location x="-8" y=" -10" z=" 10" />
		</instance>
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
	    </instances>
        </population>

        <population name="CellGroupB" cell_type="valneuron">
            <instances>
	      <instance id="">
		<location x="-8" y=" -8" z=" -10" />
	      </instance>
	      <instance id="">
		<location x="-4" y=" -8" z=" -10" />
	      </instance>
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	    </instances>
        </population>

        <population name="CellGroupC" cell_type="multifire_inputneuron">
            <instances>
                <instance id="">
                    <location x="10" y="10" z="25"/>
                </instance>
	    </instances>
        </population>
    </populations>

    <projections units="Physiological Units">
        <projection name="NetConn_1" source="CellGroupA" target="CellGroupA">
            <synapse_props synapse_type="DoubExpSyn" internal_delay="5" weight="1" threshold="-20"/>
            <connections>

<connection id='' pre_cell_id='1' post_cell_id='0'/>
<connection id='' pre_cell_id='1' post_cell_id='3'/>
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
	    </connections>
        </projection>
        <projection name="NetConn_2" source="CellGroupC" target="CellGroupA">
            <synapse_props synapse_type="DoubExpSyn" internal_delay="5" weight="1" threshold="-20"/>
            <connections>
                <connection id="" pre_cell_id="500" post_cell_id="211"/>
                <connection id="" pre_cell_id="500" post_cell_id="212"/>
                <connection id="" pre_cell_id="500" post_cell_id="213"/>
	    </connections>
        </projection>

        <projection name="test" source="CellGroupB" target="CellGroupA">
            <synapse_props synapse_type="DoubExpSyn" internal_delay="5" weight="1" threshold="-20"/>
            <connectivity_pattern>
                <fixed_probability probability="0.01"/>
            </connectivity_pattern>
        </projection>

    </projections>

</networkml>
